cpptest("list") = "cpptest, cppsum, cppsub, cppstrlen, cppnow, cppmul, cppinc, cppdiv"
cpptest("author") = "Viacheslav N. Mezentsev"
cpptest("email") = "viacheslavmezentsev@ya.ru"
cpptest("logfile") = "C:\Program Files (x86)\Mathcad\Mathcad 15\userefi\cpptest32.log"
cpptest("info") = "cpptest: 0.1.8902.31604, May 16 2024 17:33:29"
cppnow(0) = "16-05-2024 18:47:56"
cppinc(3) = 4
cppstrlen("string") = 6
cppdiv(1, 2) = 0.5
cppmul(2, 4) = 8
cppsum(1i, 2) = 2 + 1i
cppsub(1, 1i) = 1 - 1i
