# Worksheet setting: ORIGIN = 1
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# Fuente: Calculo de estructuras por el método de los elementos finitos (Oñate)
# - Modulo de Elasticidad:
E := 2.535
# - Coeficiente de Poisson:
ν := 0.20
# - Modulo de Elasticidad a corte:
G := E/(2*(1 + ν)) = 1.05625
# - Espesor de la placa:
d := 250
# - Coeficiente de corrección por corte:
κ := 5/6
# - Matriz constitutiva a flexión:
D_f := E*d^3/(12*(1 - ν^2))*[1, ν, 0; ν, 1, 0; 0, 0, (1 - ν)/2]
# - Matriz constitutiva a corte:
D_s := κ*G*d*[1, 0; 0, 1]
# - Funciones de interpolación:
N_1(ξ, η) := 1/4*(1 - ξ)*(1 - η)
N_3(ξ, η) := 1/4*(1 + ξ)*(1 + η)
N_2(ξ, η) := 1/4*(1 + ξ)*(1 - η)
N_4(ξ, η) := 1/4*(1 - ξ)*(1 + η)
N(ξ, η) := [N_1(ξ, η), N_2(ξ, η), N_3(ξ, η), N_4(ξ, η)]
# - Derivadas de las funciones de interpolación:
dN(ξ, η) := [
    ∂/∂ξ(N_1(ξ, η)), ∂/∂ξ(N_2(ξ, η)), ∂/∂ξ(N_3(ξ, η)), ∂/∂ξ(N_4(ξ, η));
    ∂/∂η(N_1(ξ, η)), ∂/∂η(N_2(ξ, η)), ∂/∂η(N_3(ξ, η)), ∂/∂η(N_4(ξ, η))
] → [(η - 1)/4, (-η + 1)/4, (η + 1)/4, (-η - 1)/4; (ξ - 1)/4, (-ξ - 1)/4, (ξ + 1)/4, (-ξ + 1)/4]
# - Coordenadas del elemento:
L1 := 3000
L2 := 1500
table  # each column defines a variable
    X | Y
    0 | 0
    L1 | 0
    L1 | L2
    0 | L2
end table
XY := augment(X, Y) = [0, 0; 3000, 0; 3000, 1500; 0, 1500]
# - Jacobiano:
J(ξ, η) := dN(ξ, η)*XY → [1500, 0; 0, 750]
# - Derivadas de las funciones de interpolación con respecto al sistema original:
d'N(ξ, η) := (J(ξ, η)^-1)*dN(ξ, η) → [
    (η - 1)/6000, (-η + 1)/6000, (η + 1)/6000, (-η - 1)/6000;
    (ξ - 1)/3000, (-ξ - 1)/3000, (ξ + 1)/3000, (-ξ + 1)/3000
]
# - Construcción de la matriz de deformación para flexión:
f(i, j) := 0
B_b(ξ, η) :=
    t ← matrix(3, 12, f)
    for i ∈ 1 .. 4
        t[1, 3*i - 1] ← d'N(ξ, η)[1, i]
        t[2, 3*i] ← d'N(ξ, η)[2, i]
        t[3, 3*i - 1] ← d'N(ξ, η)[2, i]
        t[3, 3*i] ← d'N(ξ, η)[1, i]
    t
    → [
        0, (η - 1)/6000, 0, 0, (-η + 1)/6000, 0, 0, (η + 1)/6000, 0, 0, (-η - 1)/6000, 0;
        0, 0, (ξ - 1)/3000, 0, 0, (-ξ - 1)/3000, 0, 0, (ξ + 1)/3000, 0, 0, (-ξ + 1)/3000;
        0, (ξ - 1)/3000, (η - 1)/6000, 0, (-ξ - 1)/3000, (-η + 1)/6000, 0, (ξ + 1)/3000, (η + 1)/6000, 0, (-ξ + 1)/3000, (-η - 1)/6000
    ]
# - Construcción de la matriz de deformación por corte:
B_s(ξ, η) :=
    t ← matrix(2, 12, f)
    for i ∈ 1 .. 4
        t[1, 3*i - 2] ← d'N(ξ, η)[1, i]
        t[1, 3*i - 1] ← -N(ξ, η)[1, i]
        t[2, 3*i - 2] ← d'N(ξ, η)[2, i]
        t[2, 3*i] ← -N(ξ, η)[1, i]
    t
    → [
        (η - 1)/6000, -((1 - ξ)*(1 - η))/4, 0, (-η + 1)/6000, -((1 - η)*(ξ + 1))/4, 0, (η + 1)/6000, -((η + 1)*(ξ + 1))/4, 0, (-η - 1)/6000, -((1 - ξ)*(η + 1))/4, 0;
        (ξ - 1)/3000, 0, -((1 - ξ)*(1 - η))/4, (-ξ - 1)/3000, 0, -((1 - η)*(ξ + 1))/4, (ξ + 1)/3000, 0, -((η + 1)*(ξ + 1))/4, (-ξ + 1)/3000, 0, -((1 - ξ)*(η + 1))/4
    ]
# - Puntos de integración:
table  # each column defines a variable
    ξ' | η' | W
    -1/sqrt(3) | -1/sqrt(3) | 1
    -1/sqrt(3) | 1/sqrt(3) | 1
    1/sqrt(3) | -1/sqrt(3) | 1
    1/sqrt(3) | 1/sqrt(3) | 1
end table
# - Matrices aumentadas para integración reducida:
D_f := stack(augment(D_f, matrix(3, 2, f)), matrix(2, 5, f))
D_f = [
    3438314, 687663, 0, 0, 0;
    687663, 3438314, 0, 0, 0;
    0, 0, 1375326, 0, 0;
    0, 0, 0, 0, 0;
    0, 0, 0, 0, 0
]
D_s := stack(matrix(3, 5, f), augment(matrix(2, 3, f), D_s))
B_b(ξ, η) := stack(B_b(ξ, η), matrix(2, 12, f))
D_s = [0, 0, 0, 0, 0; 0, 0, 0, 0, 0; 0, 0, 0, 0, 0; 0, 0, 0, 220.052, 0; 0, 0, 0, 0, 220.052]
B_s(ξ, η) := stack(matrix(3, 12, f), B_s(ξ, η))
# - Matriz de rigidez:
j := 1 .. 4
Φ[j] := transpose(B_b(ξ'[j], η'[j]))*D_f*B_b(ξ'[j], η'[j])*det(J(ξ'[j], η'[j]))*W[j]
K_b := sum(Φ[j], j = 1 .. 4)
K_s := 2*2*transpose(B_s(0, 0))*D_s*B_s(0, 0)*det(J(0, 0))
K_T := K_b + K_s
K_b = [
    0, 0, 0, 0, 0, 0, 0, 0, 0, 0, 0, 0;
    0, 1489936, 515747, 0, -114610, -171916, 0, -744968, -515747, 0, -630358, 171916;
    0, 515747, 2521430, 0, 171916, 916884, 0, -515747, -1260715, 0, -171916, -2177599;
    0, 0, 0, 0, 0, 0, 0, 0, 0, 0, 0, 0;
    0, -114610, 171916, 0, 1489936, -515747, 0, -630358, -171916, 0, -744968, 515747;
    0, -171916, 916884, 0, -515747, 2521430, 0, 171916, -2177599, 0, 515747, -1260715;
    0, 0, 0, 0, 0, 0, 0, 0, 0, 0, 0, 0;
    0, -744968, -515747, 0, -630358, 171916, 0, 1489936, 515747, 0, -114610, -171916;
    0, -515747, -1260715, 0, -171916, -2177599, 0, 515747, 2521430, 0, 171916, 916884;
    0, 0, 0, 0, 0, 0, 0, 0, 0, 0, 0, 0;
    0, -630358, -171916, 0, -744968, 515747, 0, -114610, 171916, 0, 1489936, -515747;
    0, 171916, -2177599, 0, 515747, -1260715, 0, -171916, 916884, 0, -515747, 2521430
]
K_s = [
    0.137533, 41.2598, 82.5195, 0.0825195, 41.2598, 82.5195, -0.137533, 41.2598, 82.5195, -0.0825195, 41.2598, 82.5195;
    41.2598, 61889.6, 0, -41.2598, 61889.6, 0, -41.2598, 61889.6, 0, 41.2598, 61889.6, 0;
    82.5195, 0, 61889.6, 82.5195, 0, 61889.6, -82.5195, 0, 61889.6, -82.5195, 0, 61889.6;
    0.0825195, -41.2598, 82.5195, 0.137533, -41.2598, 82.5195, -0.0825195, -41.2598, 82.5195, -0.137533, -41.2598, 82.5195;
    41.2598, 61889.6, 0, -41.2598, 61889.6, 0, -41.2598, 61889.6, 0, 41.2598, 61889.6, 0;
    82.5195, 0, 61889.6, 82.5195, 0, 61889.6, -82.5195, 0, 61889.6, -82.5195, 0, 61889.6;
    -0.137533, -41.2598, -82.5195, -0.0825195, -41.2598, -82.5195, 0.137533, -41.2598, -82.5195, 0.0825195, -41.2598, -82.5195;
    41.2598, 61889.6, 0, -41.2598, 61889.6, 0, -41.2598, 61889.6, 0, 41.2598, 61889.6, 0;
    82.5195, 0, 61889.6, 82.5195, 0, 61889.6, -82.5195, 0, 61889.6, -82.5195, 0, 61889.6;
    -0.0825195, 41.2598, -82.5195, -0.137533, 41.2598, -82.5195, 0.0825195, 41.2598, -82.5195, 0.137533, 41.2598, -82.5195;
    41.2598, 61889.6, 0, -41.2598, 61889.6, 0, -41.2598, 61889.6, 0, 41.2598, 61889.6, 0;
    82.5195, 0, 61889.6, 82.5195, 0, 61889.6, -82.5195, 0, 61889.6, -82.5195, 0, 61889.6
]*10^3
K_T = [
    0.137533, 41.2598, 82.5195, 0.0825195, 41.2598, 82.5195, -0.137533, 41.2598, 82.5195, -0.0825195, 41.2598, 82.5195;
    41.2598, 63379.6, 515.747, -41.2598, 61775, -171.916, -41.2598, 61144.7, -515.747, 41.2598, 61259.3, 171.916;
    82.5195, 515.747, 64411.1, 82.5195, 171.916, 62806.5, -82.5195, -515.747, 60628.9, -82.5195, -171.916, 59712;
    0.0825195, -41.2598, 82.5195, 0.137533, -41.2598, 82.5195, -0.0825195, -41.2598, 82.5195, -0.137533, -41.2598, 82.5195;
    41.2598, 61775, 171.916, -41.2598, 63379.6, -515.747, -41.2598, 61259.3, -171.916, 41.2598, 61144.7, 515.747;
    82.5195, -171.916, 62806.5, 82.5195, -515.747, 64411.1, -82.5195, 171.916, 59712, -82.5195, 515.747, 60628.9;
    -0.137533, -41.2598, -82.5195, -0.0825195, -41.2598, -82.5195, 0.137533, -41.2598, -82.5195, 0.0825195, -41.2598, -82.5195;
    41.2598, 61144.7, -515.747, -41.2598, 61259.3, 171.916, -41.2598, 63379.6, 515.747, 41.2598, 61775, -171.916;
    82.5195, -515.747, 60628.9, 82.5195, -171.916, 59712, -82.5195, 515.747, 64411.1, -82.5195, 171.916, 62806.5;
    -0.0825195, 41.2598, -82.5195, -0.137533, 41.2598, -82.5195, 0.0825195, 41.2598, -82.5195, 0.137533, 41.2598, -82.5195;
    41.2598, 61259.3, -171.916, -41.2598, 61144.7, 515.747, -41.2598, 61775, 171.916, 41.2598, 63379.6, -515.747;
    82.5195, 171.916, 59712, 82.5195, 515.747, 60628.9, -82.5195, -171.916, 62806.5, -82.5195, -515.747, 64411.1
]*10^3
K_red := submatrix(K_T, 7, 12, 7, 12) = [
    137.533, -41259.8, -82519.5, 82.5195, -41259.8, -82519.5;
    -41259.8, 63379584, 515747, 41259.8, 61775038, -171916;
    -82519.5, 515747, 64411079, -82519.5, 171916, 62806532;
    82.5195, 41259.8, -82519.5, 137.533, 41259.8, -82519.5;
    -41259.8, 61775038, 171916, 41259.8, 63379584, -515747;
    -82519.5, -171916, 62806532, -82519.5, -515747, 64411079
]
P := 3
I := L1*d^3/12
Q := [P; 0; 0; P; 0; 0]
D := K_red^-1*Q = [0.515173; -0.000143297; 0.00066872; 0.515173; 0.000143297; 0.00066872]
D_exac := (L1^3/(3*E*I))*2*P = 5.45325
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# ALGORITMO PARA ENSAMBLAR LA MATRIZ DE RIGIDEZ GLOBAL:
Lx := 3000
Ly := 3000
# - Coordenadas: | - Reacciones: | - Conectividad:
table  # each column defines a variable
    Nudo | X | Y
    1 | 0 | 0
    2 | 0 | Ly
    3 | 0.5*Lx | Ly
    4 | 0.5*Lx | 0
    5 | Lx | Ly
    6 | Lx | 0
end table
table  # each column defines a variable
    Apoyo | Rw | Rθx | Rθy
    1 | 1 | 1 | 1
    2 | 1 | 1 | 1
end table
table  # each column defines a variable
    Ele | Ini | Int | Int' | Fin
    1 | 1 | 2 | 3 | 4
    2 | 4 | 3 | 5 | 6
end table
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# - Numero de nudos:
N_nud := rows(Nudo) = 6
# - Numero de grados por nudo:
n_nudo := 3
# - Numero de grados de libertad:
N_gl := N_nud*n_nudo = 18
# - Numero de apoyos:
N_apo := rows(Apoyo) = 2
# - Numero de reacciones:
N_r := sum(Rw[i], i = 1 .. N_apo) + sum(Rθx[i], i = 1 .. N_apo) + sum(Rθy[i], i = 1 .. N_apo) = 6
# - Numero de elementos:
N_ele := rows(Ele) = 2
i := 1 .. N_ele
# - Función para crear matrices nulas:
f(i, j) := 0
# - Matriz que identifica las reacciones en los nudos:
Mre :=
    Mre ← matrix(N_nud, n_nudo, f)
    for i ∈ 1 .. N_apo
        Mre[Apoyo[i], 1] ← Rw[i]
        Mre[Apoyo[i], 2] ← Rθx[i]
        Mre[Apoyo[i], 3] ← Rθy[i]
    Mre
Mre = [1, 1, 1; 1, 1, 1; 0, 0, 0; 0, 0, 0; 0, 0, 0; 0, 0, 0]
# - Matriz que asigna los grados de libertad a cada nudo:
Mgl :=
    i ← N_gl + 1
    j ← 0
    for k ∈ 1 .. N_nud
        for l ∈ 1 .. n_nudo
            if Mre[k, l] == 1
                i ← i - 1
                Mgl[k, l] ← i
            else
                j ← j + 1
                Mgl[k, l] ← j
    Mgl
Mgl = [18, 17, 16; 15, 14, 13; 1, 2, 3; 4, 5, 6; 7, 8, 9; 10, 11, 12]
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# - Matriz que asigna los grados de libertad a cada elemento:
a :=
    for i ∈ 1 .. N_ele
        for j ∈ 1 .. n_nudo
            a[j, i] ← transpose(Mgl)[j, Ini[i]]
            a[j + n_nudo, i] ← transpose(Mgl)[j, Int[i]]
            a[j + n_nudo*2, i] ← transpose(Mgl)[j, Int'[i]]
            a[j + n_nudo*3, i] ← transpose(Mgl)[j, Fin[i]]
    a
    = [18, 4; 17, 5; 16, 6; 15, 1; 14, 2; 13, 3; 1, 7; 2, 8; 3, 9; 4, 10; 5, 11; 6, 12]
K' := K_T
K[i] := K'
# - Numero de vértices del elemento:
nv := 4
n_nudo*nv = 12
# - Ensamblaje de la matriz de rigidez de toda la estructura:
K_g[i] :=
    f(i, j) ← 0
    K_g[i] ← matrix(N_gl, N_gl, f)
    for j ∈ 1, 2 .. n_nudo*nv
        EG ← a[:, i][j]
        for k ∈ 1, 2 .. n_nudo*nv
            CG ← a[:, i][k]
            K_g[i][EG, CG] ← K[i][j, k]
    K_g[i]
K_g[1] = [
    137.533, -41259.8, -82519.5, 82.5195, -41259.8, -82519.5, 0, 0, 0, 0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;
    -41259.8, 63379584, 515747, 41259.8, 61775038, -171916, 0, 0, 0, 0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;
    -82519.5, 515747, 64411079, -82519.5, 171916, 62806532, 0, 0, 0, 0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;
    82.5195, 41259.8, -82519.5, 137.533, 41259.8, -82519.5, 0, 0, 0, 0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;
    -41259.8, 61775038, 171916, 41259.8, 63379584, -515747, 0, 0, 0, 0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;
    -82519.5, -171916, 62806532, -82519.5, -515747, 64411079, 0, 0, 0, 0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;
    0, 0, 0, 0, 0, 0, 0, 0, 0, 0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;
    0, 0, 0, 0, 0, 0, 0, 0, 0, 0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;
    0, 0, 0, 0, 0, 0, 0, 0, 0, 0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;
    0, 0, 0, 0, 0, 0, 0, 0, 0, 0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;
    0, 0, 0, 0, 0, 0, 0, 0, 0, 0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;
    0, 0, 0, 0, 0, 0, 0, 0, 0, 0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;
    -82519.5, 171916, 59712050, -82519.5, 515747, 60628933, 0, 0, 0, 0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;
    -41259.8, 61259291, -171916, 41259.8, 61144680, 515747, 0, 0, 0, 0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;
    -82.5195, -41259.8, 82519.5, -137.533, -41259.8, 82519.5, 0, 0, 0, 0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;
    -82519.5, -515747, 60628933, -82519.5, -171916, 59712050, 0, 0, 0, 0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;
    -41259.8, 61144680, -515747, 41259.8, 61259291, 171916, 0, 0, 0, 0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;
    -137.533, 41259.8, 82519.5, -82.5195, 41259.8, 82519.5, 0, 0, 0, 0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]
K_g[2] = [
    137.533, -41259.8, 82519.5, 82.5195, -41259.8, 82519.5, -82.5195, -41259.8, 82519.5, -137.533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;
    -41259.8, 63379584, -515747, 41259.8, 61775038, 171916, -41259.8, 61259291, -171916, 41259.8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;
    82519.5, -515747, 64411079, 82519.5, -171916, 62806532, -82519.5, 171916, 59712050, -82519.5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;
    82.5195, 41259.8, 82519.5, 137.533, 41259.8, 82519.5, -137.533, 41259.8, 82519.5, -82.5195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;
    -41259.8, 61775038, -171916, 41259.8, 63379584, 515747, -41259.8, 61144680, -515747, 41259.8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;
    82519.5, 171916, 62806532, 82519.5, 515747, 64411079, -82519.5, -515747, 60628933, -82519.5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;
    -82.5195, -41259.8, -82519.5, -137.533, -41259.8, -82519.5, 137.533, -41259.8, -82519.5, 82.5195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;
    -41259.8, 61259291, 171916, 41259.8, 61144680, -515747, -41259.8, 63379584, 515747, 41259.8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;
    82519.5, -171916, 59712050, 82519.5, -515747, 60628933, -82519.5, 515747, 64411079, -82519.5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;
    -137.533, 41259.8, -82519.5, -82.5195, 41259.8, -82519.5, 82.5195, 41259.8, -82519.5, 137.533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;
    -41259.8, 61144680, 515747, 41259.8, 61259291, -171916, -41259.8, 61775038, 171916, 41259.8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;
    82519.5, 515747, 60628933, 82519.5, 171916, 59712050, -82519.5, -171916, 62806532, -82519.5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;
    0, 0, 0, 0, 0, 0, 0, 0, 0, 0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;
    0, 0, 0, 0, 0, 0, 0, 0, 0, 0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;
    0, 0, 0, 0, 0, 0, 0, 0, 0, 0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;
    0, 0, 0, 0, 0, 0, 0, 0, 0, 0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;
    0, 0, 0, 0, 0, 0, 0, 0, 0, 0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;
    0, 0, 0, 0, 0, 0, 0, 0, 0, 0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]
# - Matriz de rigidez total:
K_G := sum(K_g[i], i = 1 .. N_ele)
K_G = [
    275.065, -82519.5, 0, 165.039, -82519.5, 0, -82.5195, -41259.8, 82519.5, -137.533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;
    -82519.5, 126759169, 0, 82519.5, 123550076, 0, -41259.8, 61259291, -171916, 41259.8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;
    0, 0, 128822157, 0, 0, 125613064, -82519.5, 171916, 59712050, -82519.5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;
    165.039, 82519.5, 0, 275.065, 82519.5, 0, -137.533, 41259.8, 82519.5, -82.5195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;
    -82519.5, 123550076, 0, 82519.5, 126759169, 0, -41259.8, 61144680, -515747, 41259.8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;
    0, 0, 125613064, 0, 0, 128822157, -82519.5, -515747, 60628933, -82519.5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;
    -82.5195, -41259.8, -82519.5, -137.533, -41259.8, -82519.5, 137.533, -41259.8, -82519.5, 82.5195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;
    -41259.8, 61259291, 171916, 41259.8, 61144680, -515747, -41259.8, 63379584, 515747, 41259.8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;
    82519.5, -171916, 59712050, 82519.5, -515747, 60628933, -82519.5, 515747, 64411079, -82519.5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;
    -137.533, 41259.8, -82519.5, -82.5195, 41259.8, -82519.5, 82.5195, 41259.8, -82519.5, 137.533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;
    -41259.8, 61144680, 515747, 41259.8, 61259291, -171916, -41259.8, 61775038, 171916, 41259.8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;
    82519.5, 515747, 60628933, 82519.5, 171916, 59712050, -82519.5, -171916, 62806532, -82519.5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;
    -82519.5, 171916, 59712050, -82519.5, 515747, 60628933, 0, 0, 0, 0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;
    -41259.8, 61259291, -171916, 41259.8, 61144680, 515747, 0, 0, 0, 0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;
    -82.5195, -41259.8, 82519.5, -137.533, -41259.8, 82519.5, 0, 0, 0, 0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;
    -82519.5, -515747, 60628933, -82519.5, -171916, 59712050, 0, 0, 0, 0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;
    -41259.8, 61144680, -515747, 41259.8, 61259291, 171916, 0, 0, 0, 0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;
    -137.533, 41259.8, 82519.5, -82.5195, 41259.8, 82519.5, 0, 0, 0, 0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]
# - Matriz reducida y resolución del sistema Q=KD
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k_red := submatrix(K_G, 1, 12, 1, 12)
Q := [0; 0; 0; 0; 0; 0; 3; 0; 0; 3; 0; 0]
D := k_red^-1*Q = [1.50726; -0.000283303; 0.0019915; 1.50726; 0.000283303; 0.0019915; 5.02985; -0.000128822; 0.0026871; 5.02985; 0.000128822; 0.0026871]
