# Worksheet setting: ORIGIN = 1
# Ejemplo 22: Vectores y valores propios: Análisis modal pseudotridimensional
# Matriz de masa condensada de un edificio tridimensional considerando excentricidad accidental.
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M_m := [
    9.664, 0, 0, 0, 0, 0, -3.383, 0, 0;
    0, 8.102, 0, 0, 0, 0, 0, -2.836, 0;
    0, 0, 2.956, 0, 0, 0, 0, 0, -1.035;
    0, 0, 0, 9.664, 0, 0, 5.799, 0, 0;
    0, 0, 0, 0, 8.102, 0, 0, 4.861, 0;
    0, 0, 0, 0, 0, 2.956, 0, 0, 0.887;
    -3.383, 0, 0, 5.799, 0, 0, 160.097, 0, 0;
    0, -2.836, 0, 0, 4.861, 0, 0, 134.217, 0;
    0, 0, -1.035, 0, 0, 0.887, 0, 0, 21.569
]
# Matriz de rigidez de un edificio tridimensional:
K_EDIFICIO := [
    9256.99, -5773.83, 443.906, 0, 0, 0, 0, 0, 0;
    -5773.83, 8616.398, -3449.302, 0, 0, 0, 0, 0, 0;
    443.906, -3449.302, 3029.824, 0, 0, 0, 0, 0, 0;
    0, 0, 0, 9083.663, -5751.948, 619.8, -567.114, 2383.074, 0;
    0, 0, 0, -5751.948, 8431.724, -3425.93, 2383.074, -12482.682, 0;
    0, 0, 0, 619.8, -3425.93, 2852.154, -1859.4, 10277.79, 0;
    0, 0, 0, -567.114, 2383.074, -1859.4, 330271.812, -204010.022, 11016.049;
    0, 0, 0, 2383.074, -12482.682, 10277.79, -204010.022, 282946.888, -73087.32;
    0, 0, 0, 0, 0, 0, 11016.049, -73087.32, 62784.73
]
# Análisis modal:
# Obtención de vectores y valores propios de manera muy sencilla con ayuda de Mathcad Prime. La diferencia con los resultados de ETABS se debe a que se realizo un análisis pseudotridimensional. Conozca como formular la matriz de rigidez tridimensional "exacta" en nuestro curso: ANALISIS MATRICIAL DE ESTRUCTURAS CON MATHCAD PRIME.
# Solución del problema característico:
λ := M_m^-1*K_EDIFICIO
w2 := sort(eigenvals(λ))
# Frecuencias y periodos:
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w := sqrt(w2) = [9.9581; 10.4144; 15.2314; 29.9802; 30.1657; 42.7787; 44.9769; 49.9216; 70.0136]
T_e := 2*π/w = [0.630962; 0.60332; 0.412516; 0.209578; 0.208289; 0.146876; 0.139698; 0.125861; 0.0897424]
# Normalización de modos con respecto a la masa:
j := 1 .. 9
ϕ[:, j] := eigenvec(λ, w2[j])
ϕ_n[:, j] := ϕ[:, j]/sqrt(transpose(ϕ[:, j])*M_m*ϕ[:, j])
ϕ_n = [
    0.00459675, -0.15804, 0.0255744, 0.225869, -0.0567652, -0.00999372, 0.153459, 0.0169635, -0.0209029;
    0.0071951, -0.246677, 0.0399072, -0.00634497, 0.0127313, 0.0502599, -0.240008, 0.0131895, 0.0369706;
    0.00840813, -0.288399, 0.0468046, -0.376121, 0.114111, -0.0799512, 0.287561, -0.10239, -0.0682497;
    0.153692, 0.00632608, 0.0307404, -0.0634904, -0.236817, 0.105428, 0.0164781, -0.0876858, 0.0447016;
    0.249204, 0.00960876, 0.0254916, 0.00620797, 0.0140859, -0.206928, -0.0427858, 0.100383, -0.0915435;
    0.305194, -0.00503891, -0.219156, 0.079585, 0.317426, 0.26205, 0.0644947, -0.0623852, 0.132597;
    -0.00100173, 0.00293841, 0.0385255, 0.00045447, 0.0159628, 0.0390009, 0.00965338, 0.0442567, -0.0333445;
    -0.00238981, 0.00464669, 0.0611906, 0.00597922, 0.0193802, -0.00411234, 0.00214004, -0.0145107, 0.0570889;
    -0.00226971, 0.00561059, 0.0690804, 0.0194787, 0.0321921, -0.00657985, -0.0227795, -0.157441, -0.127202
]
