# Ejemplo 22: Vectores y valores propios: Análisis modal pseudotridimensional
# Matriz de masa condensada de un edificio tridimensional considerando excentricidad accidental.
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M_m := [
    9.664, 0, 0, 0, 0, 0, -3.383, 0, 0;
    0, 8.102, 0, 0, 0, 0, 0, -2.836, 0;
    0, 0, 2.956, 0, 0, 0, 0, 0, -1.035;
    0, 0, 0, 9.664, 0, 0, 5.799, 0, 0;
    0, 0, 0, 0, 8.102, 0, 0, 4.861, 0;
    0, 0, 0, 0, 0, 2.956, 0, 0, 0.887;
    -3.383, 0, 0, 5.799, 0, 0, 160.097, 0, 0;
    0, -2.836, 0, 0, 4.861, 0, 0, 134.217, 0;
    0, 0, -1.035, 0, 0, 0.887, 0, 0, 21.569
]
# Matriz de rigidez de un edificio tridimensional:
K_EDIFICIO := [
    9256.99, -5773.83, 443.906, 0, 0, 0, 0, 0, 0;
    -5773.83, 8616.398, -3449.302, 0, 0, 0, 0, 0, 0;
    443.906, -3449.302, 3029.824, 0, 0, 0, 0, 0, 0;
    0, 0, 0, 9083.663, -5751.948, 619.8, -567.114, 2383.074, 0;
    0, 0, 0, -5751.948, 8431.724, -3425.93, 2383.074, -12482.682, 0;
    0, 0, 0, 619.8, -3425.93, 2852.154, -1859.4, 10277.79, 0;
    0, 0, 0, -567.114, 2383.074, -1859.4, 330271.812, -204010.022, 11016.049;
    0, 0, 0, 2383.074, -12482.682, 10277.79, -204010.022, 282946.888, -73087.32;
    0, 0, 0, 0, 0, 0, 11016.049, -73087.32, 62784.73
]
# Conozca que es matriz de masa consistente, condensada, diferencia entre el análisis tridimensional y pseudotridimensional. y mucho más en nuestro curso: DINAMICA ESTRUCTURAL APLICADA AL DISEÑO SISMICO CON MATHCAD PRIME.
# Análisis modal:
# Obtención de vectores y valores propios de manera muy sencilla con ayuda de Mathcad Prime. La diferencia con los resultados de ETABS se debe a que se realizo un análisis pseudotridimensional. Conozca como formular la matriz de rigidez tridimensional "exacta" en nuestro curso: ANALISIS MATRICIAL DE ESTRUCTURAS CON MATHCAD PRIME.
# Solución del problema característico:
λ := M_m^-1*K_EDIFICIO
w2 := sort(eigenvals(λ))
# Frecuencias y periodos:
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w := sqrt(w2) = [9.9581; 10.4144; 15.2314; 29.9802; 30.1657; 42.7787; 44.9769; 49.9216; 70.0136]
T_e := 2*π/w = [0.630962; 0.60332; 0.412516; 0.209578; 0.208289; 0.146876; 0.139698; 0.125861; 0.0897424]
# Normalización de modos con respecto a la masa:
j := 1 .. 9
ϕ[:, j] := eigenvec(λ, w2[j])  # error: Este índice de array no es válido. El índice debe ser un entero, no inferior a ORIGIN y que no supere el último elemento.
ϕ_n[:, j] := ϕ[:, j]/sqrt(transpose(ϕ[:, j])*M_m*ϕ[:, j])  # error: Esta variable no está definida. Compruebe que el rótulo esté definido correctamente.
ϕ_n =  # error: Esta variable no está definida. Compruebe que el rótulo esté definido correctamente.
# Nos vemos en las clases de Dinámica para seguir hablando de este interesante tema.
